# OpenSim document version 40000
InverseKinematicsTool:
  results_directory: ./
  model_file: ..\..\Models\ThoracoscapularShoulderModel_subject0.osim
  constraint_weight: Inf
  accuracy: 1e-5
  time_range: 0 15
  output_motion_file: IK_shrug01.mot
  report_errors: false
  marker_file: ..\..\TRC\shrug01.trc
  report_marker_locations: false
  IKTaskSet:
    IKMarkerTask ij: apply=true weight=1
    IKMarkerTask c7: apply=false weight=1
    IKMarkerTask t8: apply=false weight=1
    IKMarkerTask px: apply=false weight=1
    IKMarkerTask ClavicleMassCenter: apply=false weight=1
    IKMarkerTask acc: apply=false weight=1
    IKMarkerTask sc: apply=false weight=1
    IKMarkerTask ScapulaMassCenter: apply=false weight=1
    IKMarkerTask ScapulaThoracicContactPt: apply=false weight=1
    IKMarkerTask ac: apply=false weight=1
    IKMarkerTask ai: apply=true weight=2
    IKMarkerTask ts: apply=true weight=2
    IKMarkerTask aa: apply=true weight=2
    IKMarkerTask HumerusMassCenter: apply=false weight=1
    IKMarkerTask gu: apply=true weight=1
    IKMarkerTask EpL: apply=true weight=1
    IKMarkerTask EpM: apply=false weight=1
    IKMarkerTask centelbow: apply=true weight=1
    IKMarkerTask centijc7: apply=true weight=10
    IKMarkerTask centpxt8: apply=true weight=1
    IKMarkerTask ijc: apply=false weight=1
