# OpenSim document version 40000
AnalyzeTool subject01:
  model_file: C:\Users\u0101727\Documents\MyRepositories\upper-imu-dc\OpenSim\subject0\Models\subject0_weldGT_lockedEP_scaled.osim
  replace_force_set: false
  results_directory: C:\Users\u0101727\Documents\MyRepositories\upper-imu-dc\OpenSim\subject0\MA\ResultsMA\grid_4nodes_9dim\angles_26
  output_precision: 8
  initial_time: 2600.01
  final_time: 2621.44
  solve_for_equilibrium_for_auxiliary_states: false
  maximum_number_of_integrator_steps: 20000
  maximum_integrator_step_size: 1
  minimum_integrator_step_size: 1e-8
  integrator_error_tolerance: 1e-5
  coordinates_file: C:\Users\u0101727\Documents\MyRepositories\upper-imu-dc\OpenSim\subject0\MA\ResultsMA\grid_4nodes_9dim\angles_26.mot
  lowpass_cutoff_frequency_for_coordinates: -1
  AnalysisSet Analyses:
    MuscleAnalysis: start_time=0 end_time=100 step_interval=1 in_degrees=true muscle_list=all
        moment_arm_coordinate_list=all compute_moments=true
    Kinematics: start_time=0 end_time=100 step_interval=1 in_degrees=true
