# OpenSim document version 30000
AnalyzeTool subject01:
  model_file: ../Models/subject0_weldGT_lockedEP_scaled.osim
  replace_force_set: false
  results_directory: ResultsMA/subject0_weldGT_lockedEP_scaled_train_track_filt
  output_precision: 8
  initial_time: 0
  final_time: 50
  solve_for_equilibrium_for_auxiliary_states: false
  maximum_number_of_integrator_steps: 20000
  maximum_integrator_step_size: 1
  minimum_integrator_step_size: 1e-8
  integrator_error_tolerance: 1e-5
  coordinates_file: train_motion_track_filt.mot
  lowpass_cutoff_frequency_for_coordinates: -1
  AnalysisSet Analyses:
    MuscleAnalysis: start_time=0 end_time=50 step_interval=1 in_degrees=true muscle_list=all
        moment_arm_coordinate_list=all compute_moments=true
