# OpenSim document version 40000
ScaleTool ThoracoscapularShoulderModel-scaled:
  mass: 35 [kg]
  height: -1
  age: -1
  ModelScaler:
    apply: true
    marker_file: ../TRC/static_upper.trc
    time_range: 0 2.52
    preserve_mass_distribution: true
  MarkerPlacer:
    apply: true
    marker_file: ../TRC/static_upper.trc
    time_range: 0 2.52
    max_marker_movement: -1
    IKTaskSet:
      IKMarkerTask ij: apply=true weight=1
      IKMarkerTask c7: apply=true weight=1
      IKMarkerTask t8: apply=true weight=1
      IKMarkerTask px: apply=true weight=1
      IKMarkerTask ClavicleMassCenter: apply=true weight=1
      IKMarkerTask acc: apply=true weight=1
      IKMarkerTask sc: apply=true weight=1
      IKMarkerTask ScapulaMassCenter: apply=true weight=1
      IKMarkerTask ScapulaThoracicContactPt: apply=true weight=1
      IKMarkerTask ac: apply=true weight=1
      IKMarkerTask ai: apply=true weight=1
      IKMarkerTask ts: apply=true weight=1
      IKMarkerTask aa: apply=true weight=1
      IKMarkerTask HumerusMassCenter: apply=true weight=1
      IKMarkerTask gu: apply=true weight=1
      IKMarkerTask EpL: apply=true weight=1
      IKMarkerTask EpM: apply=true weight=1
      IKMarkerTask centelbow: apply=true weight=1
      IKMarkerTask centijc7: apply=true weight=1
      IKMarkerTask centpxt8: apply=true weight=1
      IKMarkerTask ijc: apply=true weight=1
      IKMarkerTask R.Radius: apply=true weight=1
      IKMarkerTask R.Ulna: apply=true weight=1
